** FEM2D 示例：顶盖驱动方腔 Q4 (10x10)
** 四壁无滑移，顶盖 u=1.0, Re=100
*MATERIAL, E=2.1e11, NU=0.3, RHO=1.0, MU=0.01, T=1.0
*NODE
1, 0.0000, 0.0000
2, 0.1000, 0.0000
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*ELEMENT, TYPE=Q4
1, 1,2,13,12
2, 2,3,14,13
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*VELOCITY
1, 1, 0.0
1, 2, 0.0
111, 1, 1.0
111, 2, 0.0
2, 1, 0.0
2, 2, 0.0
112, 1, 1.0
112, 2, 0.0
3, 1, 0.0
3, 2, 0.0
113, 1, 1.0
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110, 2, 0.0
